# OpenSim document version 20302
ForceSet Mouse_hindlimb_SO:
  PointActuator FX: body=Torso point=(0.0294 -0.0041 -0.0015) point_is_global=false direction=(1 0 0)
      force_is_global=true optimal_force=0.05
  PointActuator FY: body=Torso point=(0.0294 -0.0041 -0.0015) point_is_global=false direction=(0 1 0)
      force_is_global=true optimal_force=0.05
  PointActuator FZ: body=Torso point=(-0.0294 -0.0041 -0.0015) point_is_global=false direction=(0 0 1)
      force_is_global=true optimal_force=0.05
  TorqueActuator MX: bodyA=Torso bodyB=ground torque_is_global=true axis=(1 0 0) optimal_force=0.05
  TorqueActuator MY: bodyA=Torso bodyB=ground torque_is_global=true axis=(0 1 0) optimal_force=0.05
  TorqueActuator MZ: bodyA=Torso bodyB=ground torque_is_global=true axis=(0 0 1) optimal_force=0.05
  CoordinateActuator PelvisToGround_Rz: coordinate=PelvisToGround_Rz optimal_force=0.05
  CoordinateActuator Hip_flexion_r: coordinate=Hip_flexion_r optimal_force=0.0015
  CoordinateActuator Hip_adduction_r: coordinate=Hip_adduction_r optimal_force=0.003
  CoordinateActuator Knee_extension_r: coordinate=Knee_extension_r optimal_force=0.0005
  CoordinateActuator Ankle_flexion_r: coordinate=Ankle_flexion_r optimal_force=0.0004
  CoordinateActuator MTP_flexion_r: coordinate=MTP_flexion_r optimal_force=0.0007
