# OpenSim document version 40000
Model Mouse_Hindlimb_2019:
  gravity: 0 -9.80665 0
  length_units: meters
  force_units: N
  credits:
    Frank Anderson, Peter Loan, Ayman Habib, Ajay Seth, Michael Sherman
  Ground
  BodySet:
    Body Torso: mass=0.01864724 [kg] mass_center=(0.0293693 -0.00406515 -0.00147378)
        inertia=(1.03065e-5 9.03793e-5 8.73963e-5 8.01623e-7 4.32603e-7 -6.58324e-7) meshes=mouse_torso.vtp
    Body Pelvis: mass=0.00042274 mass_center=(0.0032 -0.001024 0.002515)
        inertia=(5.54363e-9 1.42986e-8 1.234229e-8 1.758899e-9 -3.360684e-9 1.223888e-9) meshes=Pelvis_r.vtp
      WrapCylinder GA_at_Pelvis: xyz_body_rotation=(0.0617847 -0.00610865 -0.938638)
          translation=(-0.0068 -0.0029 0.0023) quadrant=x radius=0.002 length=0.005
      WrapSphere ST_at_Pelvis: translation=(-0.0057 -0.0018 0.0036) quadrant=all radius=0.0006
      WrapEllipsoid CF_BFA_at_Pelvis: xyz_body_rotation=(1.72351 -0.713142 2.47348) translation=(-0.0043 -0.001 0.0033)
          quadrant=-y dimensions=(0.0015 0.0005 0.0025)
      WrapEllipsoid OE_at_Pelvis: xyz_body_rotation=(-0.25953 -0.429176 0.902859) translation=(-0.0039 -0.001 0.003)
          quadrant=-y dimensions=(0.0025 0.0005 0.0015)
      WrapCylinder Hip_flexors_at_pelvis: xyz_body_rotation=(-0.273319 -0.0471239 -1.25454)
          translation=(0.0009 -0.0003 0.0025) quadrant=x radius=0.0009 length=0.002
    Body Thigh_r: mass=0.0004427312 mass_center=(-0.00276649 -0.00716796 0.00299094)
        inertia=(6.84255e-8 4.23907e-8 9.12652e-8 4.687e-9 8.21985e-9 1.83237e-9) meshes=femur_r.vtp
      WrapCylinder Quads_at_Femur: xyz_body_rotation=(0.055676 -0.0233874 -2.25968)
          translation=(-0.0009 -0.0137 0.00333) quadrant=y radius=0.001 length=0.003
      WrapEllipsoid Hip_Flexors_at_Quads: xyz_body_rotation=(0.0621337 -0.0350811 0.0120428)
          translation=(-0.0001 -0.0027 0.0047) quadrant=-z dimensions=(0.001 0.003 0.0015)
      WrapEllipsoid TFL_at_Quads: xyz_body_rotation=(0.165632 0.0137881 0.0242601) translation=(-0.0004 -0.0078 0.0045)
          quadrant=all dimensions=(0.0015 0.0035 0.0013)
      WrapEllipsoid AB_at_Quads: xyz_body_rotation=(0.0888373 -0.0354302 0.0492183) translation=(-0.0008 -0.007 0.0032)
          quadrant=all dimensions=(0.001 0.0035 0.001)
      WrapEllipsoid QF_at_Femur: xyz_body_rotation=(0.0816814 0.175929 0.0671952) translation=(-0.0011 -0.0054 0.0045)
          quadrant=-x dimensions=(0.0009 0.004 0.0012)
      WrapCylinder CF_BFA_at_OE: xyz_body_rotation=(1.68669 -0.906349 0.236667) translation=(-0.0027 -0.0016 0.0033)
          quadrant=y radius=0.0005 length=0.0025
      WrapCylinder QF_at_Thigh: xyz_body_rotation=(1.49051 -0.00907571 -2.17625) translation=(-0.0039 -0.0053 0.0048)
          quadrant=y radius=0.0018 length=0.0075
      WrapEllipsoid CF_BFA_at_Femur: xyz_body_rotation=(2.01062 -0.317824 -1.76575) translation=(-0.001 -0.0008 0.0041)
          quadrant=-y dimensions=(0.0018 0.001 0.0015)
      WrapCylinder OI_at_Femur: xyz_body_rotation=(2.91941 0.173137 -0.887325) translation=(-0.0016 -0.0014 0.0036)
          quadrant=-y radius=0.0006 length=0.0025
      WrapEllipsoid PECT_at_Quads: xyz_body_rotation=(-0.00837758 0.0190241 0.0015708)
          translation=(-0.0004 -0.0047 0.0037) quadrant=all dimensions=(0.0006 0.0017 0.0008)
      WrapEllipsoid CF_BFA_at_Thigh: xyz_body_rotation=(-1.60082 -0.0546288 -1.52594)
          translation=(-0.0019 -0.0055 0.0046) quadrant=-y dimensions=(0.0015 0.0005 0.003)
    Body Leg_r: mass=0.0002178458 mass_center=(-0.0021188 -0.021069 0.00290735)
        inertia=(3.75328e-8 6.83435e-9 4.12254e-8 -4.91662e-10 -7.2687e-10 1.33015e-9)
        meshes=(patella_r.vtp tibfib_r.vtp)
      WrapCylinder Plantarflexors_at_Tibia: xyz_body_rotation=(0.0113446 0.0518363 0.0560251)
          translation=(-0.0027 -0.0168 0.0033) quadrant=-x radius=0.001 length=0.003
      WrapEllipsoid Hip_Ext_at_Gastroc: xyz_body_rotation=(-3.07143 -0.0233874 3.01226)
          translation=(-0.0023 -0.0203 0.0035) quadrant=all dimensions=(0.0025 0.006 0.002)
      WrapCylinder Ankle_Everters_at_Lat_Malleolus: xyz_body_rotation=(-0.0705113 0.0830777 0.145386)
          translation=(-0.0018 -0.0317 0.003) quadrant=-x radius=0.0008 length=0.0015
      WrapCylinder POP_at_Tibia: xyz_body_rotation=(0.155858 -0.16249 -0.0305433) translation=(-0.0019 -0.016 0.0033)
          quadrant=-x radius=0.001 length=0.004
      WrapEllipsoid BFPC_at_Leg: xyz_body_rotation=(0.187099 0.191986 -0.0829031) translation=(-0.0029 -0.0196 0.0028)
          quadrant=x dimensions=(0.0012 0.0038 0.002)
    Body Foot_r: mass=6.397135e-5 mass_center=(0.00232689 -0.032972 0.00219463)
        inertia=(6.18821e-10 1.28165e-8 1.27927e-8 -5.05041e-8 1.29032e-11 4.33399e-11) meshes=foot_r.vtp
      WrapCylinder PL_at_Calcaneus: xyz_body_rotation=(1.40272 1.42017 0.729722) translation=(-0.00248 -0.033 0.00298)
          quadrant=x radius=0.0003 length=0.0021
    Body Toes_r: mass=2.20253e-6 mass_center=(0.00891112 -0.0332413 0.00222187)
        inertia=(2.71934e-11 6.80168e-11 6.40238e-11 -8.75212e-12 4.58879e-12 3.54399e-12) meshes=phalanges_r.vtp
  JointSet:
    CustomJoint TorsoToPelvis: socket_parent_frame=Pelvis_offset socket_child_frame=Torso_offset
      Coordinate zR_TorsoToPelvis: default_value=0 range=(-3.141593 3.141593) locked=true
      PhysicalOffsetFrame Pelvis_offset: socket_parent=/bodyset/Pelvis translation=(0.0118056 0 0) [meters]
      PhysicalOffsetFrame Torso_offset: socket_parent=/bodyset/Torso translation=(0.0118056 0 0)
      SpatialTransform: axes_held_at_zero=(rotation1 rotation2 translation1 translation2 translation3)
        TransformAxis rotation3: coordinates=zR_TorsoToPelvis axis=(0 0 1) LinearFunction(coefficients=1 0)
    CustomJoint PelvisToGround: socket_parent_frame=ground_offset socket_child_frame=Pelvis_offset
      Coordinate PelvisToGround_Rx: default_value=0 range=(-3.141593 3.141593) locked=true
      Coordinate PelvisToGround_Ry: default_value=0 range=(-3.141593 3.141593) locked=true
      Coordinate PelvisToGround_Rz: range=(-3.141593 3.141593)
      Coordinate PelvisToGround_Tx: default_value=0 range=(-10 10)
      Coordinate PelvisToGround_Ty: default_value=0 range=(-10 10)
      Coordinate PelvisToGround_Tz: default_value=0 range=(-10 10)
      PhysicalOffsetFrame ground_offset: socket_parent=/ground translation=(0 0 0)
      PhysicalOffsetFrame Pelvis_offset: socket_parent=/bodyset/Pelvis translation=(0 0 0)
      SpatialTransform:
        TransformAxis rotation1: coordinates=PelvisToGround_Rx axis=(1 0 0) LinearFunction(coefficients=1 0)
        TransformAxis rotation2: coordinates=PelvisToGround_Ry axis=(0 1 0) LinearFunction(coefficients=1 0)
        TransformAxis rotation3: coordinates=PelvisToGround_Rz axis=(0 0 1) LinearFunction(coefficients=1 0)
        TransformAxis translation1: coordinates=PelvisToGround_Tx axis=(1 0 0) LinearFunction(coefficients=1 0)
        TransformAxis translation2: coordinates=PelvisToGround_Ty axis=(0 1 0) LinearFunction(coefficients=1 0)
        TransformAxis translation3: coordinates=PelvisToGround_Tz axis=(0 0 1) LinearFunction(coefficients=1 0)
    CustomJoint Hip_r: socket_parent_frame=Pelvis_offset socket_child_frame=Thigh_r_offset
      Coordinate Hip_adduction_r: default_value=0 range=(-0.6981317 0) prescribed=true
      Coordinate Hip_rotation_r: default_value=0 range=(-0.1745329 0.5235988) locked=true
      Coordinate Hip_flexion_r: range=(-0.8726646 0.8726646) clamped=true
      PhysicalOffsetFrame Pelvis_offset: socket_parent=/bodyset/Pelvis translation=(0 0 0.00313593)
      PhysicalOffsetFrame Thigh_r_offset: socket_parent=/bodyset/Thigh_r translation=(0 0 0.00313593)
      SpatialTransform: axes_held_at_zero=(translation1 translation2 translation3)
        TransformAxis rotation1: coordinates=Hip_adduction_r axis=(1 0 0) LinearFunction(coefficients=1 0)
        TransformAxis rotation2: coordinates=Hip_rotation_r axis=(0 1 0) LinearFunction(coefficients=1 0)
        TransformAxis rotation3: coordinates=Hip_flexion_r axis=(0 0 1) LinearFunction(coefficients=1 0)
    CustomJoint Knee_r: socket_parent_frame=Thigh_r_offset socket_child_frame=Leg_r_offset
      Coordinate Knee_extension_r: range=(-2.530727 0) clamped=true
      PhysicalOffsetFrame Thigh_r_offset: socket_parent=/bodyset/Thigh_r
          translation=(-0.00167383 -0.0139689 0.00337015)
      PhysicalOffsetFrame Leg_r_offset: socket_parent=/bodyset/Leg_r translation=(-0.00167383 -0.0139689 0.00337015)
      SpatialTransform: axes_held_at_zero=(rotation1 rotation2 translation1 translation2 translation3)
        TransformAxis rotation3: coordinates=Knee_extension_r axis=(0 0 1) LinearFunction(coefficients=1 0)
    CustomJoint Ankle_r: socket_parent_frame=Leg_r_offset socket_child_frame=Foot_r_offset
      Coordinate Ankle_flexion_r: range=(-0.8726646 0.8726646) clamped=true
      PhysicalOffsetFrame Leg_r_offset: socket_parent=/bodyset/Leg_r translation=(-0.002182 -0.0328 0.002083)
      PhysicalOffsetFrame Foot_r_offset: socket_parent=/bodyset/Foot_r translation=(-0.002182 -0.0328 0.002083)
      SpatialTransform: axes_held_at_zero=(rotation1 rotation2 translation1 translation2 translation3)
        TransformAxis rotation3: coordinates=Ankle_flexion_r axis=(0 0 1) LinearFunction(coefficients=1 0)
    CustomJoint MTP_r: socket_parent_frame=Foot_r_offset socket_child_frame=Toes_r_offset
      Coordinate MTP_flexion_r: range=(-0.8726646 0.8726646) clamped=true
      PhysicalOffsetFrame Foot_r_offset: socket_parent=/bodyset/Foot_r translation=(0.00760367 -0.0320936 0.00218796)
      PhysicalOffsetFrame Toes_r_offset: socket_parent=/bodyset/Toes_r translation=(0.00760367 -0.0320936 0.00218796)
      SpatialTransform: axes_held_at_zero=(rotation1 rotation2 translation1 translation2 translation3)
        TransformAxis rotation3: coordinates=MTP_flexion_r axis=(0 0 1) LinearFunction(coefficients=1 0)
  ForceSet:
    Millard2012EquilibriumMuscle [values shared by the 42 below unless stated]: fiber_damping=0 minimum_activation=0.01
      ActiveForceLengthCurve: min_norm_active_fiber_length=0.25 transition_norm_fiber_length=0.77
          max_norm_active_fiber_length=1.9 shallow_ascending_slope=0.75 minimum_value=0.1
      ForceVelocityCurve: concentric_slope_at_vmax=0.125 concentric_slope_near_vmax=0.25 isometric_slope=5
          eccentric_slope_at_vmax=0.1 eccentric_slope_near_vmax=0.15 max_eccentric_velocity_force_multiplier=1.4
      FiberForceLengthCurve: strain_at_zero_force=0 strain_at_one_norm_force=0.7
      TendonForceLengthCurve
    Millard2012EquilibriumMuscle GM_dorsal: optimal_force=1 max_isometric_force=0.936 optimal_fiber_length=0.01305
        tendon_slack_length=0.00501 pennation_angle_at_optimal=0.3563962 [radians] default_fiber_length=0.001
      PathPoint P1: Pelvis (0.01186 0.00012 0.004)
      PathPoint P2: Pelvis (0.00591 0.00014 0.003)
      PathPoint P3: Thigh_r (-0.00036 0.00024 0.005)
      PathPoint P4: Thigh_r (-0.00123 -0.00146 0.005)
    Millard2012EquilibriumMuscle GM_mid: optimal_force=1 max_isometric_force=1.026 optimal_fiber_length=0.01271
        tendon_slack_length=0.00489 pennation_angle_at_optimal=0.3563962 default_fiber_length=0.001
      PathPoint P1: Pelvis (0.01132 -0.00086 0.005)
      PathPoint P2: Pelvis (0.00682 -0.00046 0.003)
      PathPoint P3: Thigh_r (-0.00076 0.00016 0.005)
      PathPoint P4: Thigh_r (-0.00122 -0.00166 0.005)
    Millard2012EquilibriumMuscle GM_ventral: optimal_force=1 max_isometric_force=1.049 optimal_fiber_length=0.01242
        tendon_slack_length=0.00478 pennation_angle_at_optimal=0.3563962 default_fiber_length=0.001
      PathPoint P1: Pelvis (0.01106 -0.00204 0.004)
      PathPoint P2: Pelvis (0.00731 -0.00108 0.003)
      PathPoint P3: Thigh_r (-0.00064 -4e-5 0.005)
      PathPoint P4: Thigh_r (-0.00104 -0.00185 0.005)
    Millard2012EquilibriumMuscle OE: optimal_force=1 max_isometric_force=0.086 optimal_fiber_length=0.00246
        tendon_slack_length=0.00096 pennation_angle_at_optimal=0 default_fiber_length=0.001
      PathPoint P1: Pelvis (-0.00467 -0.00297 0.002)
      PathPoint P2: Thigh_r (-0.00196 -0.00104 0.003)
      PathWrap: wrap_object=OE_at_Pelvis method=hybrid
    Millard2012EquilibriumMuscle OI: optimal_force=1 max_isometric_force=0.314 optimal_fiber_length=0.00565
        tendon_slack_length=0.00065 pennation_angle_at_optimal=0 default_fiber_length=0.001
      PathPoint P1: Pelvis (-0.00517 -0.00434 0.001)
      PathPoint P2: Thigh_r (-0.00085 2e-5 0.003)
      PathWrap: wrap_object=OI_at_Femur method=hybrid
    Millard2012EquilibriumMuscle GEM: optimal_force=1 max_isometric_force=0.179 optimal_fiber_length=0.00143
        tendon_slack_length=1e-5 pennation_angle_at_optimal=0 default_fiber_length=0.001
      PathPoint P1: Pelvis (-0.00181 0.0011 0.003)
      PathPoint P2: Thigh_r (-0.00069 0.00041 0.003)
      ActiveForceLengthCurve: min_norm_active_fiber_length=0.4441 transition_norm_fiber_length=0.73
          max_norm_active_fiber_length=1.8123 shallow_ascending_slope=0.8616 minimum_value=0.1
      ForceVelocityCurve: concentric_slope_at_vmax=0.125 concentric_slope_near_vmax=0.25 isometric_slope=5
          eccentric_slope_at_vmax=0.1 eccentric_slope_near_vmax=0.15 max_eccentric_velocity_force_multiplier=1.4
          concentric_curviness=0.6 eccentric_curviness=0.9
      FiberForceLengthCurve
    Millard2012EquilibriumMuscle QF: optimal_force=1 max_isometric_force=2.03 optimal_fiber_length=0.00465
        tendon_slack_length=0.0011 pennation_angle_at_optimal=0 default_fiber_length=0.001
      PathPoint P1: Pelvis (-0.00508 -0.00446 0.001)
      PathPoint P2: Thigh_r (-0.00189 -0.00439 0.005)
      PathWrap: wrap_object=QF_at_Femur method=hybrid
      PathWrap pathwrap_0: wrap_object=QF_at_Thigh method=hybrid
    Millard2012EquilibriumMuscle AM: optimal_force=1 max_isometric_force=0.614 optimal_fiber_length=0.0076
        tendon_slack_length=0.00302 pennation_angle_at_optimal=0 default_fiber_length=0.001
      PathPoint P1: Pelvis (-0.00217 -0.001885941 0.0006623113)
      PathPoint P2: Thigh_r (-0.00167 -0.0124 0.004)
      PathWrap: wrap_object=GA_at_Pelvis method=hybrid
    Millard2012EquilibriumMuscle AL: optimal_force=1 max_isometric_force=0.402 optimal_fiber_length=0.00745
        tendon_slack_length=0.0026 pennation_angle_at_optimal=0 default_fiber_length=0.001
      PathPoint P1: Pelvis (-0.00176 -0.001537572 0.0008658666)
      PathPoint P2: Thigh_r (-0.00149 -0.01349 0.002)
      PathWrap: wrap_object=GA_at_Pelvis method=hybrid
    Millard2012EquilibriumMuscle AB: optimal_force=1 max_isometric_force=0.234 optimal_fiber_length=0.00642
        tendon_slack_length=0.0018 pennation_angle_at_optimal=0 default_fiber_length=0.001
      PathPoint P1: Pelvis (-0.00165 -0.001655563 0.001)
      PathPoint P2: Thigh_r (-0.00083 -0.01045 0.003)
      PathWrap: wrap_object=AB_at_Quads method=hybrid
      PathWrap pathwrap_0: wrap_object=GA_at_Pelvis method=hybrid
    Millard2012EquilibriumMuscle GP: optimal_force=1 max_isometric_force=0.345 optimal_fiber_length=0.00912
        tendon_slack_length=0.0044 pennation_angle_at_optimal=0 default_fiber_length=0.001
      PathPoint P1: Pelvis (-0.00441 -0.00311 0.002)
      PathPoint P2: Leg_r (-0.001171 -0.01855 0.001)
      PathWrap: wrap_object=Hip_Ext_at_Gastroc method=hybrid
      PathWrap pathwrap_0: wrap_object=GA_at_Pelvis method=hybrid
    Millard2012EquilibriumMuscle GA: optimal_force=1 max_isometric_force=0.402 optimal_fiber_length=0.00882
        tendon_slack_length=0.00607 pennation_angle_at_optimal=0 default_fiber_length=0.001
      PathPoint P1: Pelvis (-0.0044 -0.0029 0.0002831151)
      PathPoint P2: Leg_r (-0.001091 -0.01833 0.001)
      PathWrap: wrap_object=GA_at_Pelvis method=hybrid
    Millard2012EquilibriumMuscle PMA: optimal_force=1 max_isometric_force=1.338 optimal_fiber_length=0.00697
        tendon_slack_length=0.00501 pennation_angle_at_optimal=0.2712242 default_fiber_length=0.001
      PathPoint P1: Torso (0.01036 9e-5 0.001)
      PathPoint P2: Thigh_r (-0.00121 -0.00221 0.003)
      PathWrap: wrap_object=Hip_Flexors_at_Quads method=hybrid
      PathWrap pathwrap_0: wrap_object=Hip_flexors_at_pelvis method=hybrid
    Millard2012EquilibriumMuscle PMI: optimal_force=1 max_isometric_force=1.088 optimal_fiber_length=0.00578
        tendon_slack_length=0.0039 pennation_angle_at_optimal=0.2193879 default_fiber_length=0.001
      PathPoint P1: Torso (0.008 -0.00032 0)
      PathPoint P2: Thigh_r (-0.00124 -0.00204 0.003)
      PathWrap: wrap_object=Hip_Flexors_at_Quads method=hybrid
      PathWrap pathwrap_0: wrap_object=Hip_flexors_at_pelvis method=hybrid
    Millard2012EquilibriumMuscle ILI: optimal_force=1 max_isometric_force=0.549 optimal_fiber_length=0.00857
        tendon_slack_length=0.00275 pennation_angle_at_optimal=0 default_fiber_length=0.001
      PathPoint P1: Pelvis (0.01019 -0.00241 0.003)
      PathPoint P2: Thigh_r (-0.00114 -0.00234 0.003)
      PathWrap: wrap_object=Hip_Flexors_at_Quads method=hybrid
      PathWrap pathwrap_0: wrap_object=Hip_flexors_at_pelvis method=hybrid
    Millard2012EquilibriumMuscle PECT: optimal_force=1 max_isometric_force=0.363 optimal_fiber_length=0.00277
        tendon_slack_length=0.00181 pennation_angle_at_optimal=0.264941 default_fiber_length=0.001
      PathPoint P1: Pelvis (-0.00033 -0.0018 0.001)
      PathPoint P2: Thigh_r (-0.00091 -0.00561 0.003)
      PathWrap: wrap_object=PECT_at_Quads method=hybrid
    Millard2012EquilibriumMuscle CF: optimal_force=1 max_isometric_force=0.554 optimal_fiber_length=0.01137
        tendon_slack_length=0.00307 pennation_angle_at_optimal=0 default_fiber_length=0.001
      PathPoint P1: Pelvis (-0.00291625 0.000871135 0.0034206)
      PathPoint P2: Thigh_r (-0.00234 -0.00792 0.003)
      PathPoint P3: Thigh_r (-0.00184688 -0.0108865 0.00275284)
      PathPoint P4: Leg_r (-0.00145 -0.01321 0.002)
      PathWrap: wrap_object=CF_BFA_at_Thigh method=hybrid
      PathWrap pathwrap_0: wrap_object=CF_BFA_at_OE method=hybrid
      PathWrap pathwrap_1: wrap_object=CF_BFA_at_Femur method=hybrid
      PathWrap pathwrap_2: wrap_object=CF_BFA_at_Pelvis method=hybrid
      ActiveForceLengthCurve: minimum_value=0.1
      FiberForceLengthCurve
    Millard2012EquilibriumMuscle SM: optimal_force=1 max_isometric_force=1.916 optimal_fiber_length=0.01165
        tendon_slack_length=0.00409 pennation_angle_at_optimal=0 default_fiber_length=0.001
      PathPoint P1: Pelvis (-0.00406 -0.00023 0.004)
      PathPoint P2: Leg_r (-0.001371 -0.01788 0.001)
      PathWrap: wrap_object=Hip_Ext_at_Gastroc method=hybrid
    Millard2012EquilibriumMuscle ST: optimal_force=1 max_isometric_force=1.299 optimal_fiber_length=0.01111
        tendon_slack_length=0.0048 pennation_angle_at_optimal=1e-5 default_fiber_length=0.001
      PathPoint P1: Pelvis (-0.00569 -0.0012 0.003)
      PathPoint P2: Leg_r (-0.001131 -0.0199 0.001)
      PathWrap: wrap_object=Hip_Ext_at_Gastroc method=hybrid
      PathWrap pathwrap_0: wrap_object=ST_at_Pelvis method=hybrid
    Millard2012EquilibriumMuscle BFA: optimal_force=1 max_isometric_force=0.876 optimal_fiber_length=0.01145
        tendon_slack_length=0.00383 pennation_angle_at_optimal=0 default_fiber_length=0.001
      PathPoint P1: Pelvis (-0.00309394 0.000954807 0.00347957)
      PathPoint P2: Thigh_r (-0.00182 -0.01341 0.004)
      PathPoint P3: Thigh_r (-0.00193 -0.01416 0.004)
      PathWrap: wrap_object=CF_BFA_at_Thigh method=hybrid
      PathWrap pathwrap_0: wrap_object=CF_BFA_at_OE method=hybrid
      PathWrap pathwrap_1: wrap_object=CF_BFA_at_Femur method=hybrid
      PathWrap pathwrap_2: wrap_object=CF_BFA_at_Pelvis method=hybrid
    Millard2012EquilibriumMuscle BFP_cranial: optimal_force=1 max_isometric_force=0.725 optimal_fiber_length=0.01008
        tendon_slack_length=0.00491 pennation_angle_at_optimal=0 default_fiber_length=0.001
      PathPoint P1: Pelvis (-0.00353 0.00068 0.004)
      PathPoint P2: Leg_r (-0.002321 -0.0154 0.004)
    Millard2012EquilibriumMuscle BFP_mid: optimal_force=1 max_isometric_force=0.728 optimal_fiber_length=0.01004
        tendon_slack_length=0.0048 pennation_angle_at_optimal=0 default_fiber_length=0.001
      PathPoint P1: Pelvis (-0.00434 0.00021 0.004)
      PathPoint P2: Leg_r (-0.003151 -0.01665 0.004)
    Millard2012EquilibriumMuscle BFP_caudal: optimal_force=1 max_isometric_force=0.611 optimal_fiber_length=0.01197
        tendon_slack_length=0.00406 pennation_angle_at_optimal=0 default_fiber_length=0.001
      PathPoint P1: Pelvis (-0.00482 -4e-5 0.004)
      PathPoint P2: Leg_r (-0.001551 -0.01933 0.004)
      PathWrap: wrap_object=BFPC_at_Leg method=hybrid
    Millard2012EquilibriumMuscle RF: optimal_force=1 max_isometric_force=4.162 optimal_fiber_length=0.00534
        tendon_slack_length=0.00853 pennation_angle_at_optimal=0.2773328 default_fiber_length=0.001
      PathPoint P1: Pelvis (0.00215 -0.00066 0.003357727)
      PathPoint P2: Leg_r (0.0004392202 -0.01305859 0.003411714)
      PathPoint P3: Leg_r (-0.000415891 -0.01553831 0.003053648)
      PathWrap: wrap_object=Quads_at_Femur method=hybrid
    Millard2012EquilibriumMuscle VM: optimal_force=1 max_isometric_force=1.098 optimal_fiber_length=0.00653
        tendon_slack_length=0.00768 pennation_angle_at_optimal=0.2818707 default_fiber_length=0.001
      PathPoint P1: Thigh_r (-0.00029 -0.00053 0.004)
      PathPoint P2: Leg_r (0.0004098849 -0.01307 0.003243581)
      PathPoint P3: Leg_r (-0.0003107442 -0.015578 0.003092297)
      PathWrap: wrap_object=Quads_at_Femur method=hybrid
    Millard2012EquilibriumMuscle VL: optimal_force=1 max_isometric_force=2.828 optimal_fiber_length=0.00681
        tendon_slack_length=0.00735 pennation_angle_at_optimal=0.2710496 default_fiber_length=0.001
      PathPoint P1: Thigh_r (-0.00038 -0.00062 0.005)
      PathPoint P2: Leg_r (0.0003912614 -0.01313 0.003659627)
      PathPoint P3: Leg_r (-0.0004458045 -0.015632 0.003266954)
      PathWrap: wrap_object=Quads_at_Femur method=hybrid
    Millard2012EquilibriumMuscle VI: max_isometric_force=0.367 optimal_fiber_length=0.00606 tendon_slack_length=0.00702
        pennation_angle_at_optimal=0.19059 ignore_tendon_compliance=true fiber_damping=0.01 default_activation=0.01
      PathPoint P1: Thigh_r (-0.00036 -0.00149 0.004)
      PathPoint P2: Leg_r (0.0001807291 -0.0131 0.003369123)
      PathPoint P3: Leg_r (-0.0003509406 -0.01566904 0.003120969)
      PathWrap: wrap_object=Quads_at_Femur method=hybrid
      ActiveForceLengthCurve: min_norm_active_fiber_length=0.25 transition_norm_fiber_length=0.77
          max_norm_active_fiber_length=1.9 shallow_ascending_slope=0.75 minimum_value=0
      ForceVelocityCurve: concentric_slope_at_vmax=0 concentric_slope_near_vmax=0.25 isometric_slope=5
          eccentric_slope_at_vmax=0 eccentric_slope_near_vmax=0.15 max_eccentric_velocity_force_multiplier=1.4
    Millard2012EquilibriumMuscle POP: optimal_force=1 max_isometric_force=0.307 optimal_fiber_length=0.00206
        tendon_slack_length=0.00203 pennation_angle_at_optimal=0
      PathPoint P1: Thigh_r (-0.00198 -0.01312 0.004)
      PathPoint P2: Leg_r (-0.002131 -0.01687 0.002)
      PathWrap: wrap_object=POP_at_Tibia method=hybrid
    Millard2012EquilibriumMuscle TA: optimal_force=1 max_isometric_force=2.422 optimal_fiber_length=0.0049
        tendon_slack_length=0.0118 pennation_angle_at_optimal=0.2893756
      PathPoint P1: Leg_r (-0.000571 -0.01633 0.003)
      PathPoint P2: Leg_r (0.000289 -0.02144 0.002)
      PathPoint P3: Leg_r (-0.000991 -0.02535 0.002)
      PathPoint P4: Leg_r (-0.001691 -0.02965 0.002)
      PathPoint P5: Leg_r (-0.001711 -0.03154 0.002)
      PathPoint P6: Foot_r (-0.001342 -0.03279 0.002)
      ActiveForceLengthCurve
    Millard2012EquilibriumMuscle EDL: optimal_force=1 max_isometric_force=0.368 optimal_fiber_length=0.00635
        tendon_slack_length=0.02478 pennation_angle_at_optimal=0.2162463 default_fiber_length=0.001
      PathPoint P1: Leg_r (-0.001811 -0.01678 0.004660009)
      PathPoint P2: Leg_r (-0.002501 -0.03005 0.004)
      PathPoint P3: Leg_r (-0.002131 -0.03204 0.003)
      PathPoint P4: Foot_r (-0.000842 -0.03287 0.002)
      PathPoint P5: Foot_r (0.003048 -0.03249 0.002)
      PathPoint P6: Foot_r (0.005768 -0.03189 0.002)
      PathPoint P7: Foot_r (0.007308 -0.03171 0.002)
      PathPoint P8: Toes_r (0.009158 -0.03235 0.002)
      PathPoint P9: Toes_r (0.010428 -0.03289 0.002)
      PathPoint P10: Toes_r (0.011028 -0.03394 0.002)
      PathPoint P11: Toes_r (0.011188 -0.03452 0.002)
      PathPoint P12: Toes_r (0.011338 -0.03473 0.002)
    Millard2012EquilibriumMuscle EHL: optimal_force=1 max_isometric_force=0.069 optimal_fiber_length=0.0049
        tendon_slack_length=0.0118 pennation_angle_at_optimal=0.1668535 default_fiber_length=0.001
      PathPoint P1: Leg_r (-0.000831 -0.01801 0.003)
      PathPoint P2: Leg_r (-0.001541 -0.02684 0.003)
      PathPoint P3: Leg_r (-0.002081 -0.03035 0.003)
      PathPoint P4: Leg_r (-0.001951 -0.03153 0.003)
      PathPoint P5: Foot_r (-0.001052 -0.03266 0.002)
      PathPoint P6: Foot_r (0.000378 -0.03331 0.001)
      PathPoint P7: Foot_r (0.002858 -0.03307 0.001)
      PathPoint P8: Foot_r (0.005118 -0.03257 0.001)
      PathPoint P9: Toes_r (0.006488 -0.03347 0.001)
      PathPoint P10: Toes_r (0.007098 -0.03396 0.001)
    Millard2012EquilibriumMuscle MG: optimal_force=1 max_isometric_force=1.75 optimal_fiber_length=0.0055
        tendon_slack_length=0.01395 pennation_angle_at_optimal=0.2485349 default_fiber_length=0.001
      PathPoint P1: Thigh_r (-0.00162 -0.01279 0.002)
      PathPoint P2: Foot_r (-0.004232 -0.03277 0.003)
      PathWrap: wrap_object=Plantarflexors_at_Tibia method=hybrid
    Millard2012EquilibriumMuscle LG: optimal_force=1 max_isometric_force=3.784 optimal_fiber_length=0.00541
        tendon_slack_length=0.01389 pennation_angle_at_optimal=0.3015929 default_fiber_length=0.001
      PathPoint P1: Thigh_r (-0.00188 -0.01276 0.004)
      PathPoint P2: Foot_r (-0.004182 -0.0327 0.003)
      PathWrap: wrap_object=Plantarflexors_at_Tibia method=hybrid
    Millard2012EquilibriumMuscle SOL: optimal_force=1 max_isometric_force=0.2337047 optimal_fiber_length=0.00784
        tendon_slack_length=0.0034 pennation_angle_at_optimal=0.1994911 default_fiber_length=0.001
      PathPoint P1: Leg_r (-0.003271 -0.02196 0.003)
      PathPoint P2: Foot_r (-0.004012 -0.03259 0.003)
    Millard2012EquilibriumMuscle PLANT: optimal_force=1 max_isometric_force=0.88 optimal_fiber_length=0.00431
        tendon_slack_length=0.01517 pennation_angle_at_optimal=0.2984513 default_fiber_length=0.001
      PathPoint P1: Thigh_r (-0.0017 -0.01247 0.003)
      PathPoint P2: Foot_r (-0.004202 -0.03265 0.003)
      PathWrap: wrap_object=Plantarflexors_at_Tibia method=hybrid
    Millard2012EquilibriumMuscle FDL: optimal_force=1 max_isometric_force=1.896 optimal_fiber_length=0.00431
        tendon_slack_length=0.02761 pennation_angle_at_optimal=0.26529 default_fiber_length=0.001
      PathPoint P1: Leg_r (-0.002881 -0.01578 0.003)
      PathPoint P2: Leg_r (-0.003051 -0.03297 0.002)
      PathPoint P3: Foot_r (-0.001442 -0.03388 0.002)
      PathPoint P4: Foot_r (0.000868 -0.03362 0.002)
      PathPoint P5: Foot_r (0.004418 -0.03272 0.002)
      PathPoint P6: Toes_r (0.007608 -0.03251 0.002)
      PathPoint P7: Toes_r (0.009898 -0.03302 0.002)
      PathPoint P8: Toes_r (0.010568 -0.03418 0.002)
      PathPoint P9: Toes_r (0.011068 -0.03484 0.002)
    Millard2012EquilibriumMuscle TP: optimal_force=1 max_isometric_force=0.549 optimal_fiber_length=0.00359
        tendon_slack_length=0.015 pennation_angle_at_optimal=0.2694788 default_fiber_length=0.001
      PathPoint P1: Leg_r (-0.002771 -0.01596 0.002)
      PathPoint P2: Leg_r (-0.001871 -0.01732 0.003)
      PathPoint P3: Foot_r (-0.002971 -0.03288 0.002)
      PathPoint P4: Foot_r (-0.001532 -0.03368 0.001283887)
    Millard2012EquilibriumMuscle PL: optimal_force=1 max_isometric_force=0.647 optimal_fiber_length=0.00378
        tendon_slack_length=0.01408 pennation_angle_at_optimal=0.2600541 default_fiber_length=0.001
      PathPoint P1: Leg_r (-0.002761 -0.01729 0.004494738)
      PathPoint P2: Leg_r (-0.003171 -0.01859 0.004)
      PathPoint P3: Leg_r (-0.002531 -0.03007 0.003)
      PathPoint P4: Foot_r (-0.001372 -0.03371 0.003)
      PathPoint P5: Foot_r (-0.000842 -0.03379 0.003)
      PathWrap: wrap_object=Ankle_Everters_at_Lat_Malleolus method=hybrid
      PathWrap pathwrap_0: wrap_object=PL_at_Calcaneus method=hybrid
    Millard2012EquilibriumMuscle PT: max_isometric_force=0.457 optimal_fiber_length=0.00339 tendon_slack_length=0.01122
        pennation_angle_at_optimal=0.217468 fiber_damping=0.01 default_activation=0.01
      PathPoint P1: Leg_r (-0.003211 -0.01885 0.004)
      PathPoint P2: Leg_r (-0.002671 -0.0301 0.003)
      PathPoint P3: Foot_r (-0.002292 -0.03264 0.003)
      PathPoint P4: Foot_r (-0.001582 -0.03297 0.003)
      PathWrap: wrap_object=Ankle_Everters_at_Lat_Malleolus method=hybrid
      ActiveForceLengthCurve: min_norm_active_fiber_length=0.25 transition_norm_fiber_length=0.77
          max_norm_active_fiber_length=1.9 shallow_ascending_slope=0.75 minimum_value=0
      ForceVelocityCurve: concentric_slope_at_vmax=0 concentric_slope_near_vmax=0.25 isometric_slope=5
          eccentric_slope_at_vmax=0 eccentric_slope_near_vmax=0.15 max_eccentric_velocity_force_multiplier=1.4
    Millard2012EquilibriumMuscle PB: optimal_force=1 max_isometric_force=0.396 optimal_fiber_length=0.00229
        tendon_slack_length=0.01005 pennation_angle_at_optimal=0.2000147 default_fiber_length=0.001
      PathPoint P1: Leg_r (-0.003051 -0.02262 0.003)
      PathPoint P2: Foot_r (-0.002252 -0.03252 0.003)
      PathPoint P3: Foot_r (-5.2e-5 -0.03348 0.003)
      PathWrap: wrap_object=Ankle_Everters_at_Lat_Malleolus method=hybrid
    Millard2012EquilibriumMuscle PDQA: optimal_force=1 max_isometric_force=0.112 optimal_fiber_length=0.00393
        tendon_slack_length=0.02357 pennation_angle_at_optimal=0.2167699 default_fiber_length=0.001
      PathPoint P1: Leg_r (-0.003311 -0.01924 0.004)
      PathPoint P2: Leg_r (-0.002511 -0.02565 0.003)
      PathPoint P3: Foot_r (-0.002012 -0.03257 0.003)
      PathPoint P4: Foot_r (0.001048 -0.03292 0.003)
      PathPoint P5: Foot_r (0.005298 -0.03222 0.003)
      PathPoint P6: Foot_r (0.007098 -0.03203 0.003)
      PathPoint P7: Toes_r (0.009928 -0.0322 0.003)
      PathPoint P8: Toes_r (0.011588 -0.03372 0.003)
      PathWrap: wrap_object=Ankle_Everters_at_Lat_Malleolus method=hybrid
    Millard2012EquilibriumMuscle PDQI: optimal_force=1 max_isometric_force=0.102 optimal_fiber_length=0.00362
        tendon_slack_length=0.01959 pennation_angle_at_optimal=0.1647591 default_fiber_length=0.001
      PathPoint P1: Leg_r (-0.003371 -0.02117 0.003)
      PathPoint P2: Leg_r (-0.002664546 -0.03173047 0.003)
      PathPoint P2_0: Foot_r (-0.001512 -0.03285 0.003)
      PathPoint P3: Foot_r (4.8e-5 -0.03343 0.003)
      PathPoint P4: Foot_r (0.002028 -0.03309 0.003)
      PathPoint P5: Foot_r (0.005018 -0.033 0.004)
      PathPoint P6: Toes_r (0.008288 -0.03329 0.003)
      PathPoint P7: Toes_r (0.009408 -0.03404 0.003)
    ObjectGroup Hip_rotators: members=(GEM GM_dorsal GM_mid GM_ventral OE OI QF)
    ObjectGroup Hip_extensors: members=(BFA BFP_caudal BFP_cranial BFP_mid CF GA GM_dorsal GM_mid GM_ventral GP SM ST)
    ObjectGroup Hip_adductors: members=(AB AL AM GA GP)
    ObjectGroup Knee_flexors: members=(BFA BFP_caudal BFP_cranial BFP_mid GA GP LG MG PLANT POP SM ST)
    ObjectGroup Hip_flexors: members=(ILI PECT PMA PMI)
    ObjectGroup Knee_extensors: members=(RF VI VL VM)
    ObjectGroup Ankle_dorsiflexors: members=(EDL EHL TA)
    ObjectGroup Ankle_plantarflexors: members=(FDL LG MG PB PDQA PDQI PL PLANT PT SOL TP)
    ObjectGroup Ankle_everters: members=(PB PDQA PDQI PL PT)
    ObjectGroup Hip_adductors_l: members=(AB_l AL_l AM_l GA_l GP_l)
    ObjectGroup Knee_flexors_l: members=(BFA_l BFP_caudal_l BFP_cranial_l BFP_mid_l GA_l GP_l LG_l MG_l PLANT_l POP_l SM_l ST_l)
    ObjectGroup Hip_flexors_l: members=(ILI_l PECT_l PMA_l PMI_l)
    ObjectGroup Knee_extensors_l: members=(RF_l VI_l VL_l VM_l)
    ObjectGroup Ankle_dorsiflexors_l: members=(EDL_l EHL_l TA_l)
    ObjectGroup Ankle_plantarflexors_l: members=(FDL_l LG_l MG_l PB_l PDQA_l PDQI_l PL_l PLANT_l PT_l SOL_l TP_l)
    ObjectGroup Ankle_everters_l: members=(PB_l PDQA_l PDQI_l PL_l PT_l)
  MarkerSet:
    Marker Right_Illiac: Pelvis (0.003438559 0.004884248 0.004013592)
    Marker Right_Hip: Pelvis (-0.002661396 0.0006215578 0.00727678)
    Marker Left_Illiac: Pelvis (0.003438559 0.004884248 0.004013592)
    Marker Right_Knee: Thigh_r (-0.00682073 -0.0113501 0.005795057)
    Marker Right_Ankle: Leg_r (-0.002484328 -0.03187281 0.004061066)
    Marker Right_Met: Foot_r (0.004907777 -0.03194202 0.00408265)
